# Лабораторная 4
# 1.
z ← cos^2*(3/8*π + α/4) - cos^2*(11/8*π + α/4)
f(α) :=
    z ← cos(3/8*π + α/4)^2 - cos(11/8*π + α/4)^2
    return z
    = -7.21645e-16
2.
a := 0.3
n := 10
i := 1, 2 .. 10
Δi := 1
z(i) :=
    if sin((i^2 + 1)/n) > 0
        z ← a*sin((i^2 + 1)/n)
    if sin((i^2 + 1)/n) < 0
        z ← cos(i + 1/n)
    else
        z ← i
    return z
z(i) = [1; 2; 3; 4; 5; 0.983268; 0.684547; 8; 9; -0.780568]
# 3.
j := 1.78, 1.98 .. 3.2
m := 16
a := -1.24
F(j) :=
    if j < 2.5
        F ← sin(j + a)
    if j ≥ 2.5
        F ← sqrt(m) + j^2
F(j) = [0.514136; 0.674288; 0.807558; 0.908633; 10.6564; 11.7284; 12.8804; 14.1124]
