# Worksheet setting: ORIGIN = 1
# 1. Лабораторная работа №1 по Mathcad Полеводы Александра
# 2. Вычислить выражения: n – номер варианта, х – любое положительное число
# а)
4*sqrt(5 - 2*sqrt(6))/((nthroot(3, 4) + nthroot(2, 4))*(nthroot(2, 4) - nthroot(3, 4))) = -4
# б)
n := 12
x := 7
y := (sqrt(x^3 + n) + cos(|n*x - 1|))/nthroot(x^5 + 8*x + n, 4)
y = 1.67501
# в)
t := (sum(sin(i/n), i = 1 .. 10) + sum((i - n)/(i + n), i = 1 .. 5))/product((n + 3*i)/(n^2 + n*i - n), i = 1 .. 5)
t = 43544.9
# 3.
x := -2, -1.8 .. 2
# 1)
y(x) := (3^sin(2*x) - cos(2*x)^2)^3
x = [-2; -1.8; -1.6; -1.4; -1.2; -1; -0.8; -0.6; -0.4; -0.2; 0; 0.2; 0.4; 0.6; 0.8; 1; 1.2; 1.4; 1.6; 1.8; 2]
y(x) = [6.53245; 0.555173; 0.000337722; -0.00749284; -0.000309234; 0.00742424; 0.0368054; 0.0118322; -2.89079e-5; -0.00757856; 0; 0.322203; 5.03367; 18.6701; 26.9391; 16.4315; 3.77116; 0.172893; -0.000202364; -0.00677179; 5.46361e-7]
(2)
y(x) := (e^(2*x)*nthroot(1 - 4*x^2, 3))
x = [-2; -1.8; -1.6; -1.4; -1.2; -1; -0.8; -0.6; -0.4; -0.2; 0; 0.2; 0.4; 0.6; 0.8; 1; 1.2; 1.4; 1.6; 1.8; 2]
y(x) = [-0.0451702; -0.0624861; -0.0855359; -0.115432; -0.152603; -0.195187; -0.234155; -0.229085; 0.319643; 0.632473; 1; 1.40759; 1.5832; -2.52525; -5.74442; -10.6569; -18.5428; -31.216; -51.4793; -83.6958; -134.651]
# 3)
y(x) := 4*sin(2*x)/cos(3*x)^2 + sqrt(3*x^2)
x = [-2; -1.8; -1.6; -1.4; -1.2; -1; -0.8; -0.6; -0.4; -0.2; 0; 0.2; 0.4; 0.6; 0.8; 1; 1.2; 1.4; 1.6; 1.8; 2]
y(x) = [6.74767; 7.51175; 33.2695; -3.15; -1.28132; -1.97904; -5.96755; -71.1828; -21.1606; -1.94032; 0; 2.63314; 22.5463; 73.2612; 8.73883; 5.44315; 5.43824; 7.99975; -27.7269; -1.27637; 0.180534]
# 4)
y(x) := sqrt((3*x^2 + 4*x - 1)/(2*x^2 + 6))
x = [-2; -1.8; -1.6; -1.4; -1.2; -1; -0.8; -0.6; -0.4; -0.2; 0; 0.2; 0.4; 0.6; 0.8; 1; 1.2; 1.4; 1.6; 1.8; 2]
y(x) = [0.46291; 0.348991; 0.158682; 0.269408i; 0.408248i; 0.5i; 0.559631i; 0.58757i; 0.579174i; 0.525657i; 0.408248i; 0.114708i; 0.413384; 0.607493; 0.752286; 0.866025; 0.95625; 1.02784; 1.08455; 1.12944; 1.16496]
# 12)
y(x) := x^4*(2*x - 1) - ln(2)
x = [-2; -1.8; -1.6; -1.4; -1.2; -1; -0.8; -0.6; -0.4; -0.2; 0; 0.2; 0.4; 0.6; 0.8; 1; 1.2; 1.4; 1.6; 1.8; 2]
y(x) = [-80.6931; -48.9821; -28.2183; -15.2912; -7.74339; -3.69315; -1.75811; -0.978267; -0.739227; -0.695387; -0.693147; -0.694107; -0.698267; -0.667227; -0.447387; 0.306853; 2.20989; 6.22173; 13.7248; 26.6006; 47.3069]
# 4.
A := [1, 2, 3; 4, 5, 6; 7, 8, 9]
B := [9, 8, 7; 4, 5, 6; 3, 2, 1]
V := [12; 10; 8]
C := A*B
C = [26, 24, 22; 74, 69, 64; 122, 114, 106]
d := |A|*|B|
d = 0
g := transpose(V)*A*V
g = 4020
S := B*V
S = [244; 146; 64]
E := A^-1*C - B
E = [55, 56, 57; -4, -5, -6; -3, -2, -1]
q := max(A)
p := min(B)
q = 9
p = 1
# 5.
a := -π/2
b := π/2
integral(cos(2*t - 1)^3/2 - nthroot(n + 3*t, 3), t = a .. b) = -7.14987
# 6.
x := -5, -4.8 .. 5
y := -5, -4.8 .. 5
n := 50
# ВАРИАНТ 12
f(x, y) := e^(sin(x) - y^2)
x = [
    -5; -4.8; -4.6; -4.4; -4.2; -4; -3.8; -3.6; -3.4; -3.2
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]
y = [
    -5; -4.8; -4.6; -4.4; -4.2; -4; -3.8; -3.6; -3.4; -3.2
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]
f(x, y) = [
    3.62321e-11; 2.57224e-10; 1.68572e-9; 1.0198e-8; 5.69509e-8; 2.93592e-7; 1.39715e-6; 6.13761e-6; 2.48892e-5; 9.31708e-5; 0.000321962; 0.00102704
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]
# [plot: f(x, y) vs x]
