# Лабораторная работа 8.
# Полевода Александр ПОИТ-4
# 1.
x := -3, -2 .. 3
f(x) := 3*sin(x) + x - 2
f1(x) := 2^x - 2*cos(x)
# [plot: f(x) vs x]
# [plot: f1(x) vs x]
f(x) := 3*sin(x) + x - 2
x := 1
root(f(x), x) = 0.517049
root(f1(x), x) = 0.659958
# 2.
x^4 + 5*x^3 + 7*x^2 + 7*x - 20 = 0  # error: Невозможно вычислить выражение, поскольку оно делится на ноль.
V := [-20; 7; 7; 5; 1]
x := polyroots(V)
x = [-4; -1 + 2i; -1 - 2i; 1]
# Проверка
g(x) := x^4 + 5*x^3 + 7*x^2 + 7*x - 20
x := -1 + 2i
x := -4
g(x) = 0
g(x) = 0
# 3.
# Решить систему с использованием find
solve block
    # guess values
    x1 := 1
    x2 := 1
    x3 := 1
    x4 := 1
    # constraints
    2*x1 - x2 + 4*x3 == 66
    2*x2 - 6*x3 + x4 == -63
    8*x1 - 3*x2 + 6*x3 - 5*x4 == 146
    2*x1 - 7*x2 + 6*x3 - x4 == 80
    # solver
    V := find(x1, x2, x3, x4)
    V = [11.2941; 1.11765; 11.1324; 1.55882]
end solve block
# Матричным способом
A := [2, -1, 4, 1; 2, -6, 1, 0; 8, -3, 6, -5; 2, -7, 6, -1]
B := [66; -63; 146; 80]
X := A^-1*B
X = [-8.2; 12.4; 27.8; -16.4]
# 3. Способом lsolve
A := [2, -1, 4, 1; 2, -6, 1, 0; 8, -3, 6, -5; 2, -7, 6, -1]
B := [66; -63; 146; 80]
lsolve(A, B) = [-8.2; 12.4; 27.8; -16.4]
# 4. Решить систему с помощью Given and minerr
solve block
    # guess values
    x := 1
    y := 1
    # constraints
    cos(x - 2) + y == 0
    sin(y + 0.5) - x == 1
    # solver
    minerr(x, y) = [-0.138685; 0.537853]
    Given
end solve block
