# Лабораторная работа №8, Mathcad3
# Задание 1
limit(((2*x + 3)/(2*x + 1))^(x + 1), x → ∞) → e  # - производная
y(x) := x^4*atan(2*x - 1)^3 - ln(2)
-производная
d/dx(y(x)) → 4*x^3*atan(2*x - 1)^3 + 6*x^4*atan(2*x - 1)^2/((2*x - 1)^2 + 1)
integral(cos(2*x)^3*sin(2*x), x) → -cos(2*x)^4/8  # -неопределенные интегралы
# Задание 2
3*sin(x) + x - 2 solve, x → 0.517048963706
2^x - 2*cos(x) solve, x → 0.659957715113
x^4 + 5*x^3 + 7*x^2 + 7*x - 20 solve, x → [1; -4; -1 + 2i; -1 - 2i]
# Задание 3
x := -5, -4 .. 5
y1(x) := sqrt(x)
y2(x) := e^x
y3(x) := ln(x)
# [plot: y1(x), y2(x), y3(x) vs x]
# Задание 4
j := 1, 2 .. 5
m := 16
a := -1.24
F :=
    n ← 0
    for j ∈ 1.78, 1.98 .. 3.2
        if j < 2.5
            n ← n + 1
            F[n] ← sin(j + a)
        else
            n ← n + 1
            F[n] ← sqrt(m) + j^2
    F
    = [0; 0.514136; 0.674288; 0.807558; 0.908633; 10.6564; 11.7284; 12.8804; 14.1124]
